*Heading
** Job name: Job-1 Model name: Model-1
** Generated by: Abaqus/CAE 2021
*Preprint, echo=NO, model=NO, history=NO, contact=NO
**
** PARTS
**
*Part, name=Part-Cube
*Node
1,          -5.,          -5.,          10.
2,          -5.,          -3.,          10.
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*Element, type=C3D8T
1,  37,  38,  44,  43,   1,   2,   8,   7
2,  38,  39,  45,  44,   2,   3,   9,   8
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*Node
217,           0.,           5.,           5.
*Nset, nset=Part-Cube-RefPt_, internal
217,
*Nset, nset=Set-Cube, generate
1,  216,    1
*Elset, elset=Set-Cube, generate
1,  125,    1
*Nset, nset=Set-RP-0
217,
** Section: Section-Steel
*Solid Section, elset=Set-Cube, material=steel
,
*End Part
**
*Part, name=Part-Plate
*Node
1,         -30.,           0.,         100.
2,         -30.,           1.,         100.
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*Element, type=C3D8T
1,  43,  44,  46,  45,   1,   2,   4,   3
2,  45,  46,  48,  47,   3,   4,   6,   5
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*Nset, nset=Set-Plate, generate
1,  210,    1
*Elset, elset=Set-Plate, generate
1,  80,   1
** Section: Section-Steel
*Solid Section, elset=Set-Plate, material=steel
,
*End Part
**
**
** ASSEMBLY
**
*Assembly, name=Assembly
**
*Instance, name=Part-Cube-1, part=Part-Cube
10.,          16.,          90.
*End Instance
**
*Instance, name=Part-Plate-1, part=Part-Plate
30.,           0.,           0.
*End Instance
**
*Nset, nset=Set-Cube-RP-0, instance=Part-Cube-1
217,
*Nset, nset=Set-Cube-Temp, instance=Part-Cube-1
217,
*Nset, nset=Set-Plate-Whole, instance=Part-Plate-1, generate
1,  210,    1
*Elset, elset=Set-Plate-Whole, instance=Part-Plate-1, generate
1,  80,   1
*Nset, nset=b_Set-Cube, instance=Part-Cube-1, generate
1,  216,    1
*Elset, elset=b_Set-Cube, instance=Part-Cube-1, generate
1,  125,    1
*Nset, nset=_PickedSet7, internal, instance=Part-Cube-1
217,
** Constraint: Constraint-Cube
*Rigid Body, ref node=_PickedSet7, elset=b_Set-Cube
*End Assembly
*Amplitude, name=Amp-1
0.,              0.,              3.,              1.
**
** MATERIALS
**
*Material, name=steel
*Conductivity
32.2,
*Density
7.8e-09,
*Elastic
210000., 0.3
*Specific Heat
4.6e+08,
**
** INTERACTION PROPERTIES
**
*Surface Interaction, name=IntProp-1
*Friction
0.3,
*Surface Behavior, pressure-overclosure=HARD
*Gap Heat Generation
1., 0.5
**
** BOUNDARY CONDITIONS
**
** Name: BC-Cube Type: 速度/角速度
*Boundary, type=VELOCITY
Set-Cube-RP-0, 1, 1
Set-Cube-RP-0, 2, 2
Set-Cube-RP-0, 3, 3
Set-Cube-RP-0, 4, 4
Set-Cube-RP-0, 5, 5
Set-Cube-RP-0, 6, 6
** Name: BC-Plate Type: 对称/反对称/完全固定
*Boundary
Set-Plate-Whole, ENCASTRE
**
** INTERACTIONS
**
** Interaction: Int-CubeAndPlate
*Contact, op=NEW
*Contact Inclusions, ALL EXTERIOR
*Contact Property Assignment
,  , IntProp-1
** ----------------------------------------------------------------
**
** STEP: Step-1
**
*Step, name=Step-1, nlgeom=YES
*Dynamic Temperature-displacement, Explicit
, 3.
*Bulk Viscosity
0.06, 1.2
** Mass Scaling: Semi-Automatic
**               Whole Model
*Fixed Mass Scaling, factor=1e+09
**
** BOUNDARY CONDITIONS
**
** Name: BC-Cube Type: 速度/角速度
*Boundary, type=VELOCITY
Set-Cube-RP-0, 1, 1, 10.
Set-Cube-RP-0, 2, 2, 15.
Set-Cube-RP-0, 3, 3, -20.
**
** OUTPUT REQUESTS
**
*Restart, write, number interval=1, time marks=NO
**
** FIELD OUTPUT: F-Output-1
**
*Output, field, variable=PRESELECT, number interval=300
**
** HISTORY OUTPUT: H-Output-1
**
*Output, history, frequency=1
*Node Output, nset=Set-Cube-RP-0
U1, U2, U3, UR1, UR2, UR3
*End Step
